*Heading
** Job name: 3hs_manifold Model name: 3hs_exhaust_manifold
** Generated by: Abaqus/CAE 6.10-1
*Preprint, echo=NO, model=NO, history=NO, contact=NO
**
** PARTS
**
*Part, name=PART-1
*Node
      1,          12.,   4.09100008,  0.150710002
      2,          12.,    4.6880002,  -4.75600004
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*Element, type=DC3D6
1, 2169, 2172, 2170, 2404, 2406, 2405
2, 2181, 2186, 2182, 2407, 2409, 2408
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*Element, type=DC3D8
  3, 2107, 2174, 2128, 2108, 2410, 2413, 2412, 2411
  4, 2128, 2129, 2109, 2108, 2412, 2415, 2414, 2411
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*Elset, elset=PART-1-1_PSOLID_3, generate
    1,  7732,     1
** Section: Section-1-PART-1-1_PSOLID_3
*Solid Section, elset=PART-1-1_PSOLID_3, material=CHROMIUM
,
*End Part
**
**
** ASSEMBLY
**
*Assembly, name=Assembly
**
*Instance, name=PART-1-1, part=PART-1
*End Instance
**
*Nset, nset=_M5, internal, instance=PART-1-1
 11802, 11803, 11979, 11980, 11981, 11982
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*Elset, elset=ALL_3DSOLID, instance=PART-1-1, generate
    1,  7732,     1
*Elset, elset=ALL_MASSIVE_ELEMENTS, instance=PART-1-1, generate
    1,  7732,     1
*Elset, elset=__PICKEDSURF8_S2, internal, instance=PART-1-1
  233,  234,  235,  236,  237,  238
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*Elset, elset=__PICKEDSURF8_S4, internal, instance=PART-1-1
 4650, 4651, 4652, 4653, 4654, 4655
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*Nset, nset=_PickedSet11, internal, instance=PART-1-1, generate
     1,  13820,      1
*Nset, nset=_PickedSet12, internal, instance=PART-1-1
 11647, 11648, 11649, 11650, 11651, 11652
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*Nset, nset=_PickedSet13, internal, instance=PART-1-1
 2545, 2546, 2547, 2548, 2549, 2550
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*Elset, elset=__PICKEDSURF8_S2_1, internal, instance=PART-1-1
  233,  234,  235,  236,  237,  238
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*Elset, elset=__PICKEDSURF8_S4_1, internal, instance=PART-1-1
 4650, 4651, 4652, 4653, 4654, 4655
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*Surface, type=ELEMENT, name=_PICKEDSURF8, internal
__PICKEDSURF8_S2_1, S2
__PICKEDSURF8_S4_1, S4
*Elset, elset=__PickedSurf14_S2, internal, instance=PART-1-1, generate
  233,  4532,     1
*Elset, elset=__PickedSurf14_S4, internal, instance=PART-1-1
 4650, 4651, 4652, 4653, 4654, 4655
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*Surface, type=ELEMENT, name=_PickedSurf14, internal
__PickedSurf14_S2, S2
__PickedSurf14_S4, S4
*End Assembly
**
** MATERIALS
**
**   ---------------------------------------------------
**   ---- *MATERIAL ------------------------------------
**   ---------------------------------------------------
**
**   material data from MAT1 with MID = 1
**
*Material, name=CHROMIUM
*Conductivity
 93.9,
**
** PREDEFINED FIELDS
**
** Name: Predefined Field-1   Type: Temperature
*Initial Conditions, type=TEMPERATURE
_PickedSet11, 25.
** ----------------------------------------------------------------
**
** STEP: Steady
**
*Step, name=Steady
*Heat Transfer, steady state, deltmx=0.
1., 1., 1e-05, 1.,
**
** BOUNDARY CONDITIONS
**
** Name: BC-1 Type: Temperature
*Boundary
_PickedSet12, 11, 11, 50.
** Name: BC-2 Type: Temperature
*Boundary
_PickedSet13, 11, 11, 30.
**
** LOADS
**
** Name: Load-1   Type: Surface heat flux
*Dsflux
_PickedSurf14, S, 10.
**
** OUTPUT REQUESTS
**
*Restart, write, frequency=0
**
** FIELD OUTPUT: F-Output-4
**
*Output, field, variable=PRESELECT
*Output, history, frequency=0
*End Step
