*Heading
** Job name: 1st_lug Model name: 1stc_lug
** Generated by: Abaqus/CAE 6.10-1
*Preprint, echo=NO, model=NO, history=NO, contact=NO
**
** PARTS
**
*Part, name=PART-1
*Node
      1,           0., -0.0149999997,           0.
      2, 0.00574025139, -0.0138581926,           0.
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*Element, type=C3D8
  1,   1,  17,  18,   2,  79,  95,  96,  80
  2,   2,  18,  19,   3,  80,  96,  97,  81
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*Elset, elset=LUG, generate
   1,  112,    1
** Section: Section-1-LUG
*Solid Section, elset=LUG, material=STEEL
,
*End Part
**
**
** ASSEMBLY
**
*Assembly, name=Assembly
**
*Instance, name=PART-1-1, part=PART-1
*End Instance
**
*Nset, nset=ALL, instance=PART-1-1, generate
  1,  234,   1
*Nset, nset=ALLN, instance=PART-1-1, generate
  1,  78,   1
*Nset, nset=GEN1, instance=PART-1-1, generate
 33,  48,   1
*Nset, nset=HOLEBOT, instance=PART-1-1, generate
   1,  157,   78
*Nset, nset=LEFT, instance=PART-1-1, generate
 74,  78,   1
*Nset, nset=LHEND, instance=PART-1-1
  74,  75,  76,  77,  78, 152, 153, 154, 155, 156, 230, 231, 232, 233, 234
*Nset, nset=RIGHT, instance=PART-1-1, generate
 43,  47,   1
*Elset, elset=BLOCK, instance=PART-1-1, generate
 33,  56,   1
*Elset, elset=BUILTIN, instance=PART-1-1
  38,  44,  50,  56,  94, 100, 106, 112
*Nset, nset=HOLE, instance=PART-1-1, generate
  1,  16,   1
*Elset, elset=HOLE, instance=PART-1-1, generate
  1,  32,   1
*Elset, elset=HOLEIN, instance=PART-1-1
  1, 16
*Elset, elset=LUG1, instance=PART-1-1, generate
  1,  56,   1
*Elset, elset=LUG2, instance=PART-1-1, generate
  57,  112,    1
*Elset, elset=PRESS, instance=PART-1-1
  1,  2,  3,  4, 13, 14, 15, 16, 57, 58, 59, 60, 69, 70, 71, 72
*Nset, nset=_PickedSet20, internal, instance=PART-1-1
 115,
*Elset, elset=_DISTFORCE-1_S6, internal, instance=PART-1-1
  1,  2,  3,  4, 13, 14, 15, 16, 57, 58, 59, 60, 69, 70, 71, 72
*Surface, type=ELEMENT, name=DISTFORCE-1
_DISTFORCE-1_S6, S6
*End Assembly
**
** MATERIALS
**
*Material, name=STEEL
*Conductivity
20.,300.
30.,400.
*Density
7800.,
*Elastic
 2e+11, 0.3, 300
 1.9e+11, 0.3, 400
 1.6e+11, 0.3, 500
*Expansion
 0.0001,300.
 0.0002,400.
 0.0003,500.
*Physical Constants, absolute zero=0.
*Initial Conditions, type=TEMPERATURE
ALL, 300.
** ----------------------------------------------------------------
**
** STEP: Step-1
**
*Step, name=Step-1
*Static
1., 1., 1e-05, 1.
**
** BOUNDARY CONDITIONS
**
** Name: Disp-BC-1 Type: Symmetry/Antisymmetry/Encastre
*Boundary
LHEND, ENCASTRE
*Temperature
LHEND, 600
*Dsload
DISTFORCE-1, P, 5e+07
**
** OUTPUT REQUESTS
**
*Restart, write, frequency=0
**
** FIELD OUTPUT: F-Output-2
**
*Output, field
*NODE output
NT
*Element Output, directions=YES
NFORC,S
**
** FIELD OUTPUT: F-Output-1
**
*Output, field, variable=PRESELECT
*Output, history, frequency=0
*End Step
