*Heading
** Job name: Falcon_FEM_Skin Model name: Falcon_FEM_Skin
** Generated by: Abaqus/CAE 6.10-1
*Preprint, echo=NO, model=NO, history=NO, contact=NO
**
** PARTS
**
*Part, name=PART-1
*Node
      1,   1.58846223, -0.814972878, -0.565054774
      2,      1.58831,  -0.84208566, -0.438003033
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*Element, type=S4
 1, 13, 11, 12, 14
 2, 12, 15, 16, 14
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*Element, type=S3
31, 65, 69, 64
33, 68, 67, 63
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*Elset, elset=ENGINE_2
 30829, 30830, 30831, 30832, 30833, 30834
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*Elset, elset=ENGINE_2_R
 30095, 30096, 30097, 30098, 30099, 30100
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*Elset, elset=E_OUTER_SKIN_2
  561,  562,  563,  564,  565,  567
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*Elset, elset=E_OUTER_SKIN_2_R
 15336, 15337, 15338, 15339, 15340, 15342
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*Elset, elset=E_REARFAIRING_2
  3326,  3327,  3328,  3329,  3330,  3331
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*Elset, elset=E_REARFAIRING_2_R
 18099, 18100, 18101, 18102, 18103, 18104
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*Elset, elset=E_SKIN_2
   536,   537,   538,   539,   540,   541
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*Elset, elset=E_SKIN_2_R
 15311, 15312, 15313, 15314, 15315, 15316
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*Elset, elset=F_OUTER_SKIN_2
   196,   197,   198,   199,   200,   201
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*Elset, elset=F_OUTER_SKIN_2_R
 14971, 14972, 14973, 14974, 14975, 14976
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*Elset, elset=F_SKIN_2
    66,    67,    68,    69,    70,    71
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*Elset, elset=F_SKIN_2_R
 14841, 14842, 14843, 14844, 14845, 14846
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*Elset, elset=HT_SKIN_2
  1193,  1194,  1195,  1196,  1197,  1198
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*Elset, elset=HT_SKIN_2_R
 15968, 15969, 15970, 15971, 15972, 15973
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*Elset, elset=MW_SKIN_2
  3951,  3952,  3953,  3954,  3955,  3956
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*Elset, elset=MW_SKIN_2_R
 18724, 18725, 18726, 18727, 18728, 18729
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*Elset, elset=MW_WINGTIP_2, generate
 30451,  30780,      1
*Elset, elset=MW_WINGTIP_2_R
 29554, 29555, 29556, 29557, 29558, 29559
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*Elset, elset=N_FAIRING_2
     1,   404,   405,   406,   407,   408
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*Elset, elset=N_FAIRING_2_R
 14776, 15179, 15180, 15181, 15182, 15183
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*Elset, elset=N_SKIN_2
    2,    3,    4,    5,    6,    7
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*Elset, elset=N_SKIN_2_R
 14777, 14778, 14779, 14780, 14781, 14782
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*Elset, elset=N_WINDOW_2
   42,   43,   44,   45,   46,   47
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*Elset, elset=N_WINDOW_2_R
 14817, 14818, 14819, 14820, 14821, 14822
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*Elset, elset=VT_REARFAIRING_2, generate
  996,  1055,     1
*Elset, elset=VT_REARFAIRING_2_R, generate
 15771,  15830,      1
*Elset, elset=VT_SKIN_2
   825,   826,   827,   828,   829,   830
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*Elset, elset=VT_SKIN_2_R
 15600, 15601, 15602, 15603, 15604, 15605
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** Section: Section-1-N_FAIRING_2
*Shell Section, elset=N_FAIRING_2, material=ALUM
0.011, 5
** Section: Section-2-N_SKIN_2
*Shell Section, elset=N_SKIN_2, material=ALUM
0.003, 5
** Section: Section-3-N_WINDOW_2
*Shell Section, elset=N_WINDOW_2, material=ALUM
0.01, 5
** Section: Section-4-F_SKIN_2
*Shell Section, elset=F_SKIN_2, material=ALUM
0.0012, 5
** Section: Section-5-F_OUTER_SKIN_2
*Shell Section, elset=F_OUTER_SKIN_2, material=ALUM
0.006, 5
** Section: Section-6-E_SKIN_2
*Shell Section, elset=E_SKIN_2, material=ALUM
0.004, 5
** Section: Section-7-E_OUTER_SKIN_2
*Shell Section, elset=E_OUTER_SKIN_2, material=ALUM
0.006, 5
** Section: Section-8-VT_SKIN_2
*Shell Section, elset=VT_SKIN_2, material=ALUM
0.003, 5
** Section: Section-9-VT_REARFAIRING_2
*Shell Section, elset=VT_REARFAIRING_2, material=ALUM
0.0025, 5
** Section: Section-12-HT_SKIN_2
*Shell Section, elset=HT_SKIN_2, material=ALUM
0.006, 5
** Section: Section-37-E_REARFAIRING_2
*Shell Section, elset=E_REARFAIRING_2, material=ALUM
0.003, 5
** Section: Section-39-MW_SKIN_2
*Shell Section, elset=MW_SKIN_2, material=ALUM
0.003, 5
** Section: Section-76-N_FAIRING_2_R
*Shell Section, elset=N_FAIRING_2_R, material=ALUM_R
0.011, 5
** Section: Section-77-N_SKIN_2_R
*Shell Section, elset=N_SKIN_2_R, material=ALUM_R
0.003, 5
** Section: Section-78-N_WINDOW_2_R
*Shell Section, elset=N_WINDOW_2_R, material=ALUM_R
0.01, 5
** Section: Section-79-F_SKIN_2_R
*Shell Section, elset=F_SKIN_2_R, material=ALUM_R
0.0012, 5
** Section: Section-80-F_OUTER_SKIN_2_R
*Shell Section, elset=F_OUTER_SKIN_2_R, material=ALUM_R
0.006, 5
** Section: Section-81-E_SKIN_2_R
*Shell Section, elset=E_SKIN_2_R, material=ALUM_R
0.004, 5
** Section: Section-82-E_OUTER_SKIN_2_R
*Shell Section, elset=E_OUTER_SKIN_2_R, material=ALUM_R
0.006, 5
** Section: Section-83-VT_SKIN_2_R
*Shell Section, elset=VT_SKIN_2_R, material=ALUM_R
0.003, 5
** Section: Section-84-VT_REARFAIRING_2_R
*Shell Section, elset=VT_REARFAIRING_2_R, material=ALUM_R
0.0025, 5
** Section: Section-87-HT_SKIN_2_R
*Shell Section, elset=HT_SKIN_2_R, material=ALUM_R
0.006, 5
** Section: Section-112-E_REARFAIRING_2_R
*Shell Section, elset=E_REARFAIRING_2_R, material=ALUM_R
0.003, 5
** Section: Section-114-MW_SKIN_2_R
*Shell Section, elset=MW_SKIN_2_R, material=ALUM_R
0.003, 5
** Section: Section-151-MW_WINGTIP_2_R
*Shell Section, elset=MW_WINGTIP_2_R, material=ALUM_R
0.002, 5
** Section: Section-157-ENGINE_2_R
*Shell Section, elset=ENGINE_2_R, material=ALUM_R
0.004, 5
** Section: Section-161-MW_WINGTIP_2
*Shell Section, elset=MW_WINGTIP_2, material=ALUM
0.002, 5
** Section: Section-163-ENGINE_2
*Shell Section, elset=ENGINE_2, material=ALUM
0.004, 5
*End Part
**
**
** ASSEMBLY
**
*Assembly, name=Assembly
**
*Instance, name=PART-1-1, part=PART-1
*End Instance
**
*Elset, elset=_PICKEDSET4, internal, instance=PART-1-1
    66,    75,    76,    77,    78,    79
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*Elset, elset=_PICKEDSET5, internal, instance=PART-1-1
 30829, 30830, 30831, 30832, 30833, 30834
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*Elset, elset=_PICKEDSET6, internal, instance=PART-1-1
 30095, 30096, 30097, 30098, 30099, 30100
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*Elset, elset=_PICKEDSET10, internal, instance=PART-1-1
  1193,  1194,  1195,  1196,  1197,  1198
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*Elset, elset=_PICKEDSET27, internal, instance=PART-1-1
  3951,  3952,  3953,  3954,  3955,  3956
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*Elset, elset=_PICKEDSET28, internal, instance=PART-1-1
     1,     2,     4,     5,     6,     7
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*Nset, nset=MAIN_R_RP1, instance=PART-1-1
 10527,
*Nset, nset=MAIN_R_RP2, instance=PART-1-1
 10529,
*Nset, nset=MAIN_R_RP3, instance=PART-1-1
 9994,
*Nset, nset=MAIN_L_RP1, instance=PART-1-1
 2391,
*Nset, nset=MAIN_L_RP2, instance=PART-1-1
 2393,
*Nset, nset=MAIN_L_RP3, instance=PART-1-1
 1858,
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 *Elset, elset=CSD, internal, instance=PART-1-1
 18724, 18725, 18726, 18727, 18728, 18729
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**Elset, elset=CFD, internal, instance=PART-1-1
**2000001, 2000002, 2000003, 2000004
**Surface, type=ELEMENT, name=CFD_Surface, internal
**CFD, SPOS
*Surface, type=ELEMENT, name=CSD_Surface, internal
CSD, SPOS
*End Assembly
**
** MATERIALS
**
*Material, name=ALUM
*Density
2700.,
*Elastic
 7e+10, 0.33
*Material, name=ALUM_R
*Density
2700.,
*Elastic
 7e+10, 0.33
*Material, name=TITANIUM
*Density
4454.,
*Elastic
 1.1727e+11, 0.34
*Material, name=TITANIUM_R
*Density
4454.,
*Elastic
 1.1727e+11, 0.34
** ----------------------------------------------------------------
**
** STEP: Step-1
**
*Step, name=Step-1
*Static
1., 1., 1e-05, 1.
**
** LOADS
**
** Name: Load-1   Type: Pressure
**Dsload
**CSD_Surface, P, 1.
**Dsload
**CFD_Surface, P, 1.
*Dsload, EXTFILE=starccm
CSD_Surface, D:\Sources\Repository3\branches\ICARUS_InertiaRelief\CFDInput\Falcon_FEM_Skin
**
** OUTPUT REQUESTS
**
*Restart, write, frequency=0
**
** FIELD OUTPUT: F-Output-1
**
*Output, field, variable=PRESELECT
**
** HISTORY OUTPUT: H-Output-1
**
*Output, history, variable=PRESELECT
*End Step
