*Heading
** Job name: Falcon_FEM_Skin_Sym Model name: Falcon_FEM_Skin_Sym
** Generated by: Abaqus/CAE 6.10-1
*Preprint, echo=NO, model=NO, history=NO, contact=NO
**
** PARTS
**
*Part, name=PART-1
*Node
      4,   1.58899999,  -1.43937564e-06,  -1.11538303
     41,   2.22227716,  -1.27511953e-06,  0.752499998
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*Element, type=S4
14776, 8428, 8429, 8427, 8426
14777, 8427, 8429, 8431, 8430
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*Element, type=S3
14806, 8475, 8474, 8479
14808, 8478, 8473, 8477
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*Elset, elset=_PickedSet32, internal
 14776, 14777, 14778, 14779, 14780, 14781
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** Section: Section-1
*Shell Section, elset=_PickedSet32, material=ALUM
0.1, 5
*End Part
**
**
** ASSEMBLY
**
*Assembly, name=Assembly
**
*Instance, name=PART-1-1, part=PART-1
*End Instance
**
*Elset, elset=_PICKEDSET4, internal, instance=PART-1-1
 14841, 14850, 14851, 14852, 14853, 14854
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*Elset, elset=_PICKEDSET6, internal, instance=PART-1-1
 30095, 30096, 30097, 30098, 30099, 30100
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*Elset, elset=_PICKEDSET10, internal, instance=PART-1-1
 15968, 15969, 15970, 15971, 15972, 15973
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*Elset, elset=_PICKEDSET27, internal, instance=PART-1-1
 18724, 18725, 18726, 18727, 18728, 18729
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*Elset, elset=_PICKEDSET28, internal, instance=PART-1-1
 14776, 14777, 14779, 14780, 14781, 14782
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*Elset, elset=_PICKEDSET29, internal, instance=PART-1-1
 14841, 14842, 14843, 14844, 14845, 14846
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*Elset, elset=_PICKEDSET32, internal, instance=PART-1-1
 14841, 14842, 14843, 14844, 14845, 14846
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*Nset, nset=_T-INITIAL, internal, instance=PART-1-1
  8809,  8821,  8822,  8828,  8837,  8838
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*Elset, elset=__PickedSurf46_SPOS, internal, instance=PART-1-1
 14776, 14777, 14778, 14779, 14780, 14781
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*Surface, type=ELEMENT, name=_PickedSurf46, internal
__PickedSurf46_SPOS, SPOS
*End Assembly
**
** MATERIALS
**
*Material, name=ALUM
*Density
2700.,
*Elastic
 7e+10, 0.33
** ----------------------------------------------------------------
**
** STEP: Step-1
**
*Step, name=Step-1
*Static
1., 1., 1e-05, 1.
**
** LOADS
**
** Name: Load-2   Type: Pressure
**Dsload
**_PickedSurf46, P, 1.
*Dsload, EXTFILE=starccm
_PickedSurf46, D:\Sources\ICARUS_Models\CFD\aircraft\Falcon2000S
**
** OUTPUT REQUESTS
**
*Restart, write, frequency=0
**
** FIELD OUTPUT: F-Output-1
**
*Output, field, variable=PRESELECT
**
** HISTORY OUTPUT: H-Output-2
**
*Output, history, variable=PRESELECT
*End Step
