*Heading
** Job name: Falcon_FEM_Skin_Sym Model name: Falcon_FEM_Skin_Sym
** Generated by: Abaqus/CAE 6.10-1
*Preprint, echo=NO, model=NO, history=NO, contact=NO
**
** PARTS
**
*Part, name=PART-1
*Node
      4,   1.58899999,  -1.43937564e-06,  -1.11538303
     41,   2.22227716,  -1.27511953e-06,  0.752499998
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*Element, type=S4
14776, 8428, 8429, 8427, 8426
14777, 8427, 8429, 8431, 8430
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*Element, type=S3
14806, 8475, 8474, 8479
14808, 8478, 8473, 8477
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*Elset, elset=ENGINE_2_R
 30095, 30096, 30097, 30098, 30099, 30100
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*Elset, elset=E_OUTER_SKIN_2_R
 15336, 15337, 15338, 15339, 15340, 15342
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*Elset, elset=E_REARFAIRING_2_R
 18099, 18100, 18101, 18102, 18103, 18104
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*Elset, elset=E_SKIN_2_R
 15311, 15312, 15313, 15314, 15315, 15316
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*Elset, elset=F_OUTER_SKIN_2_R
 14971, 14972, 14973, 14974, 14975, 14976
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*Elset, elset=F_SKIN_2_R
 14841, 14842, 14843, 14844, 14845, 14846
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*Elset, elset=_PickedSet185, internal
 14776, 14777, 14778, 14779, 14780, 14781
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** Section: SKIN
*Shell Section, elset=_PickedSet185, material=ALUM
0.0012, 5
*End Part
**
**
** ASSEMBLY
**
*Assembly, name=Assembly
**
*Instance, name=PART-1-1, part=PART-1
*End Instance
**
*Elset, elset=_PICKEDSET4, internal, instance=PART-1-1
 14841, 14850, 14851, 14852, 14853, 14854
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*Elset, elset=_PICKEDSET6, internal, instance=PART-1-1
 30095, 30096, 30097, 30098, 30099, 30100
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*Elset, elset=_PICKEDSET10, internal, instance=PART-1-1
 15968, 15969, 15970, 15971, 15972, 15973
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*Elset, elset=_PICKEDSET27, internal, instance=PART-1-1
 18724, 18725, 18726, 18727, 18728, 18729
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*Elset, elset=_PICKEDSET28, internal, instance=PART-1-1
 14776, 14777, 14779, 14780, 14781, 14782
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*Elset, elset=_PICKEDSET29, internal, instance=PART-1-1
 14841, 14842, 14843, 14844, 14845, 14846
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*Elset, elset=_PICKEDSET30, internal, instance=PART-1-1
 15179, 15180, 15181, 15182, 15183, 15184
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*Elset, elset=_PICKEDSET31, internal, instance=PART-1-1
 14776, 14777, 14778, 14779, 14780, 14781
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*Elset, elset=_PICKEDSET32, internal, instance=PART-1-1
 14841, 14842, 14843, 14844, 14845, 14846
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*Elset, elset=_PICKEDSET33, internal, instance=PART-1-1
 15007, 15008, 15009, 15010, 15011, 15012
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*Elset, elset=_PICKEDSET34, internal, instance=PART-1-1
 15311, 15312, 15313, 15314, 15315, 15316
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*Elset, elset=_PICKEDSET35, internal, instance=PART-1-1
 15311, 15312, 15313, 15315, 15316, 15317
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*Elset, elset=_PICKEDSET36, internal, instance=PART-1-1
 15314, 15367, 15368, 15369, 15370, 15371
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*Elset, elset=_PICKEDSET37, internal, instance=PART-1-1
 15600, 15601, 15602, 15603, 15604, 15605
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*Nset, nset=NOSE_RP1, instance=PART-1-1
 14505,
*Nset, nset=NOSE_RP2, instance=PART-1-1
 14455,
*Nset, nset=MAIN_R_RP1, instance=PART-1-1
 10527,
*Nset, nset=MAIN_R_RP2, instance=PART-1-1
 10529,
*Nset, nset=MAIN_R_RP3, instance=PART-1-1
 9994,
*Elset, elset=WHOLE_MODEL, instance=PART-1-1
 14776, 14777, 14778, 14779, 14780, 14781
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*Nset, nset=LIFT, instance=PART-1-1
  8809,  8821,  8822,  8828,  8837,  8838
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*Elset, elset=_PICKEDSET4593, internal, instance=PART-1-1
 18745, 18746, 18749, 18751, 18753, 18755
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*Nset, nset=_PickedSet47, internal, instance=PART-1-1
     4,    41,    42,    43,    44,    45
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*Elset, elset=__PickedSurf52_SPOS, internal, instance=PART-1-1
 14776, 14777, 14778, 14779, 14780, 14781
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*Surface, type=ELEMENT, name=_PickedSurf52, internal
__PickedSurf52_SPOS, SPOS
*Nonstructural Mass, elset=_PICKEDSET4, units=TOTAL MASS
498.235,
*Nonstructural Mass, elset=_PICKEDSET6, units=TOTAL MASS
623.5,
*Nonstructural Mass, elset=_PICKEDSET10, units=TOTAL MASS
3.65812,
*Nonstructural Mass, elset=_PICKEDSET27, units=TOTAL MASS
13.6032,
*Nonstructural Mass, elset=_PICKEDSET28, units=TOTAL MASS
349.381,
*Nonstructural Mass, elset=_PICKEDSET29, units=TOTAL MASS
99.845,
*Nonstructural Mass, elset=_PICKEDSET30, units=TOTAL MASS
1.05,
*Nonstructural Mass, elset=_PICKEDSET31, units=TOTAL MASS
77.245,
*Nonstructural Mass, elset=_PICKEDSET32, units=TOTAL MASS
973.68,
*Nonstructural Mass, elset=_PICKEDSET33, units=TOTAL MASS
83.66,
*Nonstructural Mass, elset=_PICKEDSET34, units=TOTAL MASS
191.925,
*Nonstructural Mass, elset=_PICKEDSET35, units=TOTAL MASS
143.57,
*Nonstructural Mass, elset=_PICKEDSET36, units=TOTAL MASS
91.1535,
*Nonstructural Mass, elset=_PICKEDSET37, units=TOTAL MASS
1.4576,
*Nonstructural Mass, elset=_PICKEDSET4593, units=TOTAL MASS
346.5,
*End Assembly
**
** MATERIALS
**
**  ----------------------------------------------------------------
**
**
** COMMENTS FROM *DENSITY
** ======================
**
** Damping, beta =  0.0147
*Material, name=ALUM
*Density
2700.,
*Elastic
 7e+10, 0.33
** COMMENTS FROM *DENSITY
** ======================
**
** Damping, beta =  0.0147
*Material, name=ALUM_R
*Density
2700.,
*Elastic
 7e+10, 0.33
** COMMENTS FROM *DENSITY
** ======================
**
** Damping, beta =  0.0147
*Material, name=TITANIUM
*Density
4454.,
*Elastic
 1.1727e+11, 0.34
** COMMENTS FROM *DENSITY
** ======================
**
** Damping, beta =  0.0147
*Material, name=TITANIUM_R
*Density
4454.,
*Elastic
 1.1727e+11, 0.34
** ----------------------------------------------------------------
**
** STEP: Step-1
**
*Step, name=Step-1
*Static
1., 1., 1e-05, 1.
**
** BOUNDARY CONDITIONS
**
** Name: BC-1 Type: Displacement/Rotation
*Boundary
_PickedSet47, 1, 1
_PickedSet47, 2, 2
_PickedSet47, 3, 3
_PickedSet47, 4, 4
_PickedSet47, 5, 5
_PickedSet47, 6, 6
**
** LOADS
**
** Name: Load-1   Type: Pressure
*Dsload, EXTFILE=starccm
_PickedSurf52, D:\Sources\ICARUS_Models\CFD\aircraft\Falcon2000S
**
** OUTPUT REQUESTS
**
*Restart, write, frequency=0
**
** FIELD OUTPUT: F-Output-1
**
*Output, field, variable=PRESELECT
**
** HISTORY OUTPUT: H-Output-1
**
*Output, history, variable=PRESELECT
*End Step
