*Heading
** Job name: airfoil Model name: Model-1
** Generated by: Abaqus/CAE 2018
*Preprint, echo=NO, model=NO, history=NO, contact=NO
**
** PARTS
**
*Part, name=Part-1
*Node
      1,           2., 0.00260000001,           1.
      2,           2., -0.00260000001,           1.
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*Element, type=S4
   1,  256,  259,    5,    1
   2,  259,  260,    6,    5
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*Nset, nset=_PickedSet16, internal, generate
    1,  2730,     1
*Elset, elset=_PickedSet16, internal, generate
    1,  2625,     1
** Section: Section-1
*Shell Section, elset=_PickedSet16, material=Material-1
0.01, 5
*End Part
**
**
** ASSEMBLY
**
*Assembly, name=Assembly
**
*Instance, name=Part-1-1, part=Part-1
*End Instance
**
*Nset, nset=_PickedSet11, internal, instance=Part-1-1
   1,   2,   3,   4,   5,   6
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*Elset, elset=_PickedSet11, internal, instance=Part-1-1
    1,    2,    3,    4,    5,    6
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*Elset, elset=__PickedSurf18_SPOS, internal, instance=Part-1-1, generate
    1,  2625,     1
*Surface, type=ELEMENT, name=_PickedSurf18, internal
__PickedSurf18_SPOS, SPOS
*End Assembly
**
** MATERIALS
**
*Material, name=Material-1
*Density
2700.,
*Elastic
 7e+10, 0.3
** ----------------------------------------------------------------
**
** STEP: Step-1
**
*Step, name=Step-1, nlgeom=NO
*Static
1., 1., 1e-05, 1.
**
** BOUNDARY CONDITIONS
**
** Name: BC-1 Type: Displacement/Rotation
*Boundary
_PickedSet11, 1, 1
_PickedSet11, 2, 2
_PickedSet11, 3, 3
_PickedSet11, 4, 4
_PickedSet11, 5, 5
_PickedSet11, 6, 6
**
** LOADS
**
** Name: Load-1   Type: Pressure
*Dsload, EXTFILE=starccm
_PickedSurf18, D:\Sources\ICARUS_Models\CFD\airfoil\airfoil_naca4412
**
** OUTPUT REQUESTS
**
*Restart, write, frequency=0
**
** FIELD OUTPUT: F-Output-1
**
*Output, field
*Node Output
CF, RF, U
*Element Output, directions=YES
EEQUT, LE, MVF, P, PE, PEEQ, PEMAG, S, SEQUT, TE, TEEQ, TEVOL
*Contact Output
CDISP, CSTRESS
**
** HISTORY OUTPUT: H-Output-1
**
*Output, history, variable=PRESELECT
*End Step
