*Heading
** Job name: pipe_model Model name: StructureModel
** Generated by: Abaqus/CAE 6.10-1
*Preprint, echo=NO, model=NO, history=NO, contact=NO
**
** PARTS
**
*Part, name=pipe
*Node
      1,           0., 0.0500000007,          0.5
      2,           0., 0.0500000007,           0.
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*Element, type=C3D8I
  1,   8, 122, 513, 160,   1,  17, 353,  90
  2, 122, 121, 514, 513,  17,  18, 354, 353
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*Nset, nset=_PickedSet9, internal, generate
    1,  1632,     1
*Elset, elset=_PickedSet9, internal, generate
   1,  792,    1
*Nset, nset=x_fixed
   6,   7, 128, 129, 130, 131
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*Nset, nset=y_fixed
   5,   8,  91,  92,  93,  94
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** Section: solid_steel
*Solid Section, elset=_PickedSet9, material=steel
,
*End Part
**
**
** ASSEMBLY
**
*Assembly, name=Assembly
**
*Instance, name=pipe-1, part=pipe
*End Instance
**
*Nset, nset=_PickedSet11, internal, instance=pipe-1
    5,    6,    7,    8,   11,   12
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*Elset, elset=_PickedSet11, internal, instance=pipe-1, generate
   1,  792,    1
*Nset, nset=_PickedSet12, internal, instance=pipe-1
   1,   2,   3,   4,   5,   6
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*Elset, elset=_PickedSet12, internal, instance=pipe-1
   1,  33,  34,  66,  67,  99
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*Elset, elset=__PickedSurf4_S2, internal, instance=pipe-1, generate
   1,  792,    1
*Surface, type=ELEMENT, name=_PickedSurf4, internal
__PickedSurf4_S2, S2
*End Assembly
**
** MATERIALS
**
*Material, name=steel
*Elastic
 2.15e+09, 0.28
** ----------------------------------------------------------------
**
** STEP: static
**
*Step, name=static
*Static, direct
0.1, 1.,
**
** BOUNDARY CONDITIONS
**
** Name: fixed_wall Type: Displacement/Rotation
*Boundary
_PickedSet11, 1, 1
_PickedSet11, 2, 2
** Name: z-dir Type: Displacement/Rotation
*Boundary
_PickedSet12, 3, 3
**
** LOADS
**
** Name: Load-1   Type: Pressure
*Dsload, EXTFILE=starccm
_PickedSurf4, D:\Sources\Repository3\branches\ICARUS_InertiaRelief\CFDInput\pipe
**
** OUTPUT REQUESTS
**
*Restart, write, frequency=0
**
** FIELD OUTPUT: F-Output-1
**
*Output, field
*Node Output
CF, RF, TF, U
*Element Output, directions=YES
LE, NFORC, P, PE, PEEQ, PEMAG, S, SF
*Contact Output
CDISP, CSTRESS
**
** HISTORY OUTPUT: H-Output-1
**
*Output, history, variable=PRESELECT
*End Step
