*Heading
** Job name: aeroheating_dflux-sub Model name: aeroheating_dflux-Copy
** Generated by: Abaqus/CAE 6.10-1
*Preprint, echo=NO, model=NO, history=NO, contact=NO
**
** PARTS
**
*Part, name=PART-1
*Node
      8,   1.99995387,  0.166666672, 0.0793014318
     14,   4.51666832,  0.166666672, 0.0289671421
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*Element, type=DS3
 161, 2220, 2500,  860
 162,  860, 2500,  861
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*Element, type=DC3D6
2395, 2376, 2340, 1520,  544, 2082, 2062
2396, 2240, 2340, 2376,   21, 2082,  544
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*Elset, elset=RENE41
 3997, 3998, 4021, 4022, 4047, 4048
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*Elset, elset=Min-K
 2395, 2396, 2427, 2428, 2459, 2460
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*Elset, elset=TIMETAL_Skin
  161,  162,  169,  170,  171,  172
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*Elset, elset=_PickedSet7, internal
 2395, 2396, 2427, 2428, 2459, 2460
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*Elset, elset=_PickedSet8, internal
 3997, 3998, 4021, 4022, 4047, 4048
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*Elset, elset=_PickedSet10, internal
  161,  162,  169,  170,  171,  172
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*Elset, elset=_Surf-1_S2, internal
 3997, 3998, 4021, 4022, 4047, 4048
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*Surface, type=ELEMENT, name=Surf-1
_Surf-1_S2, S2
*Elset, elset=_Surf-2_S2, internal
 4279, 4280, 4287, 4288, 4295, 4296
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*Surface, type=ELEMENT, name=Surf-2
_Surf-2_S2, S2
*Elset, elset=_Surf-3_S2, internal
 4987, 4988, 5019, 5020, 5051, 5052
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*Surface, type=ELEMENT, name=Surf-3
_Surf-3_S2, S2
*Elset, elset=_Surf-4_S2, internal
 5359, 5360, 5383, 5384, 5405, 5406
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*Surface, type=ELEMENT, name=Surf-4
_Surf-4_S2, S2
*Elset, elset=_Surf-6_S3, internal
 2852, 2868, 2882, 2894, 2904, 2912
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*Elset, elset=_Surf-6_S5, internal
 2768, 2792, 2814, 2834, 3059, 3067
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*Surface, type=ELEMENT, name=Surf-6
_Surf-6_S3, S3
_Surf-6_S5, S5
*Elset, elset=_Surf-5_S3, internal
 3265, 3295, 3327, 3361, 3397, 3433
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*Elset, elset=_Surf-5_S5, internal
 2396, 2428, 2460, 2492, 2524, 2556
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*Surface, type=ELEMENT, name=Surf-5
_Surf-5_S3, S3
_Surf-5_S5, S5
** Section: skin
*Shell Section, elset=_PickedSet10, material=TIMETAL834, offset=SPOS
0.00635, 5
** Section: Min-K
*Solid Section, elset=_PickedSet7, material=Min-K
,
** Section: RENE41
*Solid Section, elset=_PickedSet8, material=RENE41
,
*End Part
**
**
** ASSEMBLY
**
*Assembly, name=Assembly
**
*Instance, name=PART-1-1, part=PART-1
*End Instance
**
*Elset, elset=MIN-K, instance=PART-1-1
 2395, 2396, 2427, 2428, 2459, 2460
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*Elset, elset=RENE-41, instance=PART-1-1
 3997, 3998, 4021, 4022, 4047, 4048
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*Elset, elset=TIMETAL834, instance=PART-1-1
  161,  162,  169,  170,  171,  172
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*Nset, nset=_PickedSet103, internal, instance=PART-1-1
   15,   20,  200,  226,  232,  237
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*End Assembly
**
** MATERIALS
**
*Material, name=Min-K
*Conductivity
 0.052,
*Density
256.,
*Specific Heat
858.,
** Temperature unit: Kelvin
*Material, name=RENE41
*Conductivity
18.,
*Density
8240.,
*Specific Heat
541.,
** Temperature Unit: Kelvin
*Material, name=TIMETAL834
*Conductivity
7.,
*Density
4550.,
*Specific Heat
525.,
**
*Matrix, TYPE=POD, INPUT=..\input\aeroheating_dflux-sub.pod
** PHYSICAL CONSTANTS
**
*Physical Constants, absolute zero=0., stefan boltzmann=5.67037e-08
** ----------------------------------------------------------------
**
** STEP: Step-1
**
*Step, name=Step-1, inc=1000000000
*Heat Transfer, end=PERIOD, ROM=3
1., 10., , ,
**
** LOADS
**
** Name: Load-1   Type: Concentrated heat flux
*Cflux
_PickedSet103, 11, 10.
*End Step
