*Heading
** Job name: aeroheating_dflux-surface Model name: aeroheating_dflux-surface
** Generated by: Abaqus/CAE 6.10-1
*Preprint, echo=NO, model=NO, history=NO, contact=NO
**
** PARTS
**
*Part, name=PART-1
*Node
      1,   2.96049929,   2.66666675, 0.0502723977
      2,   2.52985358,   2.33333325, 0.0420400091
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*Element, type=DS3
   1, 2589, 2179, 2183
   2, 2183, 2179, 2184
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*Element, type=DC3D6
2125, 2109,  487, 2108,   40, 1866,  169
2126,  489,  487, 2109, 1931, 1866,   40
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*Elset, elset=RENE41, generate
 3853,  5580,     1
*Elset, elset=Min-K, generate
 2125,  3852,     1
*Elset, elset=TIMETAL_Skin
    1,    2,    3,    4,    5,    6
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*Elset, elset=Stiffener
   15,   16,   27,   28,   37,   38
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*Elset, elset=_PickedSet7, internal, generate
 2125,  3852,     1
*Elset, elset=_PickedSet8, internal, generate
 3853,  5580,     1
*Elset, elset=_PickedSet9, internal
   15,   16,   27,   28,   37,   38
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*Elset, elset=_PickedSet10, internal
    1,    2,    3,    4,    5,    6
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*Elset, elset=_Surf-1_S2, internal
 3853, 3854, 3855, 3856, 3857, 3858
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*Surface, type=ELEMENT, name=Surf-1
_Surf-1_S2, S2
*Elset, elset=_Surf-2_S2, internal, generate
 4209,  4640,     1
*Surface, type=ELEMENT, name=Surf-2
_Surf-2_S2, S2
*Elset, elset=_Surf-3_S2, internal
 4717, 4718, 4719, 4720, 4721, 4722
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*Surface, type=ELEMENT, name=Surf-3
_Surf-3_S2, S2
*Elset, elset=_Surf-4_S2, internal
 4917, 4918, 4919, 4920, 4947, 4948
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*Surface, type=ELEMENT, name=Surf-4
_Surf-4_S2, S2
*Elset, elset=_Surf-6_SNEG, internal
 6161, 6162, 6163, 6164, 6165, 6166
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*Elset, elset=_Surf-6_S3, internal
 2852, 2868, 2882, 2894, 2904, 2912
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*Elset, elset=_Surf-6_S5, internal
 2768, 2792, 2814, 2834, 3059, 3067
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*Surface, type=ELEMENT, name=Surf-6
_Surf-6_SNEG, SNEG
_Surf-6_S3, S3
_Surf-6_S5, S5
*Elset, elset=_Surf-5_SNEG, internal
 6159, 6160, 6173, 6174, 6175, 6176
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*Elset, elset=_Surf-5_S3, internal
 3265, 3295, 3327, 3361, 3397, 3433
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*Elset, elset=_Surf-5_S5, internal
 2396, 2428, 2460, 2492, 2524, 2556
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*Surface, type=ELEMENT, name=Surf-5
_Surf-5_SNEG, SNEG
_Surf-5_S3, S3
_Surf-5_S5, S5
*Elset, elset=_Surf-7_SPOS, internal
 6010, 6011, 6012, 6013, 6014, 6015
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*Elset, elset=_Surf-7_S4, internal
 2325, 2327, 2357, 2359, 2990, 2994
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*Elset, elset=_Surf-7_S5, internal
 2451, 2483, 2515, 2547, 2583, 2623
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*Surface, type=ELEMENT, name=Surf-7
_Surf-7_SPOS, SPOS
_Surf-7_S4, S4
_Surf-7_S5, S5
*Elset, elset=_Surf-8_SPOS, internal
 5999, 6000, 6001, 6002, 6003, 6004
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*Elset, elset=_Surf-8_S4, internal
 2125, 2127, 2133, 2141, 2151, 2163
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*Elset, elset=_Surf-8_S5, internal
 3720, 3742, 3762, 3780, 3796, 3810
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*Surface, type=ELEMENT, name=Surf-8
_Surf-8_SPOS, SPOS
_Surf-8_S4, S4
_Surf-8_S5, S5
** Section: skin
*Shell Section, elset=_PickedSet10, material=TIMETAL834, offset=SPOS
0.00635, 5
** Section: stiffener
*Shell Section, elset=_PickedSet9, material=TIMETAL834
0.00254, 5
** Section: Min-K
*Solid Section, elset=_PickedSet7, material=Min-K
,
** Section: RENE41
*Solid Section, elset=_PickedSet8, material=RENE41
,
*End Part
**
**
** ASSEMBLY
**
*Assembly, name=Assembly
**
*Instance, name=PART-1-1, part=PART-1
*End Instance
**
*Nset, nset=Wire-1-Set-1, instance=PART-1-1
    3,   21,   38,   43,   45,   50
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*Nset, nset=Wire-2-Set-1, instance=PART-1-1
   16,   28,   33,   40,   96,   99
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*Nset, nset=Wire-3-Set-1, instance=PART-1-1
   22,   46,   90,  108,  127,  131
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*Nset, nset=Wire-4-Set-1, instance=PART-1-1
    6,   11,   23,   34,   41,   64
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*Nset, nset=Wire-5-Set-1, instance=PART-1-1
    5,   42,   47,   59,   77,  110
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*Nset, nset=Wire-6-Set-1, instance=PART-1-1
   36,   37,   52,   54,   63,   71
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*Elset, elset=MIN-K, instance=PART-1-1, generate
 2125,  3852,     1
*Elset, elset=RENE-41, instance=PART-1-1, generate
 3853,  5580,     1
*Elset, elset=SURFACE, instance=PART-1-1, generate
 6873,  7304,     1
*Elset, elset=TIMETAL834, instance=PART-1-1, generate
    1,  2124,     1
*Elset, elset=TIMETAL834_STIIFFENER, instance=PART-1-1, generate
 5999,  6872,     1
*Nset, nset=_PickedSet22, internal, instance=PART-1-1
   15,   19,   21,   85,  107,  136
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*Nset, nset=_PickedSet23, internal, instance=PART-1-1
   24,  192,  236,  273,  288,  320
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*Nset, nset=_PickedSet95, internal, instance=PART-1-1, generate
    1,  2812,     1
*Elset, elset=__PickedSurf96_S2, internal, instance=PART-1-1
 3853, 3854, 3855, 3856, 3857, 3858
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*Surface, type=ELEMENT, name=_PickedSurf96, internal
__PickedSurf96_S2, S2
*Elset, elset=__PickedSurf97_S2, internal, instance=PART-1-1, generate
 4209,  4640,     1
*Surface, type=ELEMENT, name=_PickedSurf97, internal
__PickedSurf97_S2, S2
*Elset, elset=__PickedSurf98_S2, internal, instance=PART-1-1
 4717, 4718, 4719, 4720, 4721, 4722
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*Surface, type=ELEMENT, name=_PickedSurf98, internal
__PickedSurf98_S2, S2
*Elset, elset=__PickedSurf99_S2, internal, instance=PART-1-1
 4917, 4918, 4919, 4920, 4947, 4948
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*Surface, type=ELEMENT, name=_PickedSurf99, internal
__PickedSurf99_S2, S2
*End Assembly
**
** MATERIALS
**
*Material, name=Min-K
*Conductivity
 0.052,
*Density
256.,
*Specific Heat
858.,
** Temperature unit: Kelvin
*Material, name=RENE41
*Conductivity
18.,
*Density
8240.,
*Specific Heat
541.,
** Temperature Unit: Kelvin
*Material, name=TIMETAL834
*Conductivity
7.,
*Density
4550.,
*Specific Heat
525.,
**
** PHYSICAL CONSTANTS
**
*Physical Constants, absolute zero=0., stefan boltzmann=5.67037e-08
**
** BOUNDARY CONDITIONS
**
** Name: BC-1 Type: Displacement/Rotation
*Boundary
_PickedSet23, 1, 1
_PickedSet23, 2, 2
_PickedSet23, 3, 3
_PickedSet23, 4, 4
_PickedSet23, 5, 5
_PickedSet23, 6, 6
** Name: BC-2 Type: Displacement/Rotation
*Boundary
_PickedSet22, 2, 2
**
** PREDEFINED FIELDS
**
** Name: Predefined Field-1   Type: Temperature
*Initial Conditions, type=TEMPERATURE
_PickedSet95, 293.15, 293.15, 293.15, 293.15, 293.15
** ----------------------------------------------------------------
**
** STEP: Step-1
**
*Step, name=Step-1, inc=1000000000
*Heat Transfer, end=PERIOD
1., 1000., , ,
**
** LOADS
**
** Name: Load-1   Type: Surface heat flux
*Dsflux
_PickedSurf96, S, 100000.
** Name: Load-2   Type: Surface heat flux
*Dsflux
_PickedSurf97, S, 100000.
** Name: Load-3   Type: Surface heat flux
*Dsflux
_PickedSurf98, S, 100000.
** Name: Load-4   Type: Surface heat flux
*Dsflux
_PickedSurf99, S, 100000.
**
** CONTROLS
**
*Controls, reset
*Controls, parameters=time incrementation
, , , , , , , 10, , ,
**
** OUTPUT REQUESTS
**
*Restart, write, overlay, frequency=1
**
** FIELD OUTPUT: F-Output-1
**
*Output, field
*Node Output
NT, RFL
*Element Output, directions=YES
HFL, TEMP
*Radiation Output
FTEMP,
**
** HISTORY OUTPUT: H-Output-1
**
*Output, history
*Contact Output
HFLA,
*Radiation Output
FTEMP,
*End Step
